Source := READBMP("M19_logo.bmp")
hex_table(dec) :=
    "0" if dec == 0
    "1" if dec == 1
    "2" if dec == 2
    "3" if dec == 3
    "4" if dec == 4
    "5" if dec == 5
    "6" if dec == 6
    "7" if dec == 7
    "8" if dec == 8
    "9" if dec == 9
    "A" if dec == 10
    "B" if dec == 11
    "C" if dec == 12
    "D" if dec == 13
    "E" if dec == 14
    "F" if dec == 15
dec2hex(dec) :=
    rem ← 0
    hex ← ""
    i ← 0
    while dec ≥ 16
        rem ← mod(dec, 16)
        if i
            hex ← concat(" ", hex_table(rem), hex)
            i ← 0
        otherwise
            hex ← concat(hex_table(rem), hex)
            i ← 1
        dec ← trunc(dec/16)
    hex ← concat(hex_table(dec), hex) if i
    hex ← concat("0", hex_table(dec), hex) otherwise
# [component: outputs ShCmd]
Table :=
    M ← Source
    for i ∈ 0 .. cols(M) - 1
        for j ∈ 0 .. rows(M) - 1
            T[j, i] ← M[j, i]/255
            if (j == 7) or (j == 15) or (j == 23) or (j == 31)
                BT[bycnt] ← 128*T[j, i] + 64*T[j - 1, i] + 32*T[j - 2, i] + 16*T[j - 3, i] + 8*T[j - 4, i] + 4*T[j - 5, i] + 2*T[j - 6, i] + 1*T[j - 7, i]
                BThex[bycnt] ← dec2hex(BT[bycnt])
                bycnt ← bycnt + 1
    for i ∈ 0 .. 3
        for j ∈ 0 .. rows(BThex)/4 - 1
            A[j, i] ← BThex[j*4 + i]
    B ← stack(ShCmd, "b0", "40", A[:, 0], ShCmd, "b1", "40", A[:, 1], ShCmd, "b2", "40", A[:, 2], ShCmd, "b3", "40", A[:, 3])
    for i ∈ 0 .. rows(B) - 1
        Count[i] ← i
        Colon[i] ← ":"
        ComData[i] ← B[i]
        Semicolon[i] ← ";"
    C[:, 0] ← Count
    C[:, 1] ← Colon
    C[:, 2] ← ComData
    C[:, 3] ← Semicolon
    D[:, 0] ← ["WIDTH=8;"; ""; ""; ""]
    D[:, 1] ← ["DEPTH=512;"; ""; ""; ""]
    D[:, 2] ← ["ADDRESS_RADIX=UNS;"; ""; ""; ""]
    D[:, 3] ← ["DATA_RADIX=HEX;"; ""; ""; ""]
    D[:, 4] ← ["CONTENT BEGIN"; ""; ""; ""]
    for i ∈ 0 .. rows(C) - 1
        D[:, i + 5] ← transpose(C)[:, i]
    D[:, rows(C) + 5] ← [concat("[", num2str(rows(C)), "..", "511", "]"); ":"; "00"; ";"]
    D[:, rows(C) + 6] ← ["END;"; ""; ""; ""]
    transpose(D)
Table = [
    "WIDTH=8;", "", "", "";
    "DEPTH=512;", "", "", "";
    "ADDRESS_RADIX=UNS;", "", "", "";
    "DATA_RADIX=HEX;", "", "", "";
    "CONTENT BEGIN", "", "", "";
    0, ":", "80", ";";
    1, ":", "00", ";";
    2, ":", "80", ";";
    3, ":", "12", ";";
    4, ":", "80", ";"
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]
# [component: inputs Table]
