# [component: outputs U]
# [component: outputs C]
y(x) := 4095/2500*x
Kcorr :=
    for i ∈ 0 .. 39
        k[i] ← y(U[i])/C[i]
    k
K_CORR(x) :=
    (Kcorr[20] - Kcorr[0])/1040*x + (Kcorr[0] - (Kcorr[20] - Kcorr[0])/1040*207) if x < 1250
    (Kcorr[39] - Kcorr[21])/934*x + (Kcorr[21] - (Kcorr[39] - Kcorr[21])/934*1297) otherwise
(Kcorr[20] - Kcorr[0])/1040 = -3.2153e-5
Kcorr[0] - (Kcorr[20] - Kcorr[0])/1040*207 = 1.00981
y(U) = [
    339.066; 424.242; 509.418; 594.594; 679.77; 764.946; 848.484; 933.66; 1018.84; 1104.01
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]
Kcorr = [
    1.00315; 1.00057; 0.998859; 0.997641; 0.99673; 0.996023; 0.992379; 0.991146; 0.990122; 0.989258
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]
δ :=
    for i ∈ 0 .. 39
        d[i] ← (y(U[i]) - C[i]*K_CORR(U[i]))/y(U[i])*100
    d
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